// SBML level 3 version 2

model Pritchard2002_glycolysis()
  // from:
  // Schemes of fluc control in a model of Saccharomyces cerevisiae glycolysis
  // Pritchard, L and Kell, DB Eur. J. Biochem. 269(2002), 3894-3904.
  // It represents a modified version of Teusink et al. Eur. J. Biochem. 267(2000), 5313-5329.
  // The model is a translation from the GEPASI file encoded by Leighton Pritchard.
  // This version uses the Vmaxes found by the best fit (R1) of Table 1 of the Pritchard and Kell paper and simulates a decrease of external glucose concentration from 100 to 2 mM.
  // To reproduce the values in table 2 of the publication, set GLCo to 50 mM and compute the steady state.
  // To the extent possible under law, all copyright and related or neighbouring rights to this encoded model have been dedicated to the public domain worldwide. Please refer to CC0 Public Domain Dedication for more information.
  // In summary, you are entitled to use this encoded model in absolutely any manner you deem suitable, verbatim, or with modification, alone or embedded it in a larger context, redistribute it, commercially or not, in a restricted way or not.
  // To cite BioModels Database, please use: Li C, Donizelli M, Rodriguez N, Dharuri H, Endler L, Chelliah V, Li L, He E, Henry A, Stefan MI, Snoep JL, Hucka M, Le Novère N, Laibe C (2010) BioModels Database: An enhanced, curated and annotated resource for published quantitative kinetic models. BMC Syst Biol., 4:92.
  // biomodels.db:MODEL8293171637 biomodels.db:BIOMD0000000172
  // isDerivedFrom biomodels.db:BIOMD0000000064
  // isDescribedBy pubmed:12180966
  // isVersionOf GO:0006096
  // isPartOf kegg.pathway:sce00010
  // hasTaxon taxonomy:4932
  // model units - substance: substance, time: time_unit

  // Compartments:
  compartment cell = 1; cell is "cytosol";  // GO:0005829
  compartment ext_ = 1; ext_ is "exterior";  // GO:0005576

  // Species:
  species $GLCo in ext_ = 2; GLCo is "Glc(ext)";  // CHEBI:4167 kegg.compound:C00031
  species GLCi in cell = 0.09765223; GLCi is "Glc(int)";  // CHEBI:4167 kegg.compound:C00031
  species ATP in cell = 2.525127;  // CHEBI:15422 kegg.compound:C00002
  species G6P in cell = 2.67504; G6P is "Glu6P";  // CHEBI:17665 kegg.compound:C00668
  species ADP in cell = 1.281988;  // CHEBI:16761 kegg.compound:C00008
  species F6P in cell = 0.6249764; F6P is "Fru6-P";  // CHEBI:16084 kegg.compound:C05345
  species F16bP in cell = 6.221321; F16bP is "Fru1,6-P2";  // CHEBI:28013 kegg.compound:C05378
  species AMP in cell = 0.2928849;  // CHEBI:16027 kegg.compound:C00020
  species $F26bP in cell = 0.02; F26bP is "Fru2,6-P2";  // CHEBI:28602 kegg.compound:C00665
  species DHAP in cell = 1.004153; DHAP is "glycerone phosphate";  // CHEBI:16108 kegg.compound:C00111
  species GAP in cell = 0.04518092; GAP is "Gra3P";  // CHEBI:29052 kegg.compound:C00118
  species NAD in cell = 1.50329;  // CHEBI:15846 kegg.compound:C00003
  species BPG in cell = 0.0007368735; BPG is "Gri2,3P2";  // CHEBI:16001 kegg.compound:C00236
  species NADH in cell = 0.0867097;  // CHEBI:16908 kegg.compound:C00004
  species P3G in cell = 0.8856885; P3G is "Gri3P";  // CHEBI:17794 kegg.compound:C00197
  species P2G in cell = 0.1276958; P2G is "Gri2P";  // CHEBI:17835 kegg.compound:C00631
  species PEP in cell = 0.06323521; PEP is "phosphoenolpyruvate";  // CHEBI:18021 kegg.compound:C00074
  species PYR in cell = 1.815313; PYR is "pyruvate";  // CHEBI:15361 kegg.compound:C00022
  species AcAld in cell = 0.1781406; AcAld is "acetaldehyde";  // CHEBI:15343 kegg.compound:C00084
  species $CO2 in cell = 1;  // CHEBI:16526 kegg.compound:C00011
  species $EtOH in cell = 50; EtOH is "ethanol";  // CHEBI:16236 kegg.compound:C00469
  species $Glycerol in cell = 0.15; Glycerol is "glycerol";  // CHEBI:17754 kegg.compound:C00116
  species $Glycogen in cell = 0; Glycogen is "glycogen";  // CHEBI:28087 kegg.compound:C00182
  species $Trehalose in cell = 0; Trehalose is "trehalose";  // CHEBI:16551 kegg.compound:C01083
  species $Succinate in cell = 0; Succinate is "succinate";  // CHEBI:30031 kegg.compound:C00042

  // Parameters:
  HXT_Vmax_1 = 97.24;
  HXT_Kglc_1 = 1.1918;
  HXT_Ki_1 = 0.91;
  HK_Vmax_2 = 236.7;
  HK_Kglc_2 = 0.08;
  HK_Katp_2 = 0.15;
  HK_Keq_2 = 2000;
  HK_Kg6p_2 = 30;
  HK_Kadp_2 = 0.23;
  PGI_Vmax_3 = 1056;
  PGI_Kg6p_3 = 1.4;
  PGI_Keq_3 = 0.29;
  PGI_Kf6p_3 = 0.3;
  PFK_Vmax_4 = 110;
  PFK_gR_4 = 5.12;
  PFK_Kf6p_4 = 0.1;
  PFK_Katp_4 = 0.71;
  PFK_L0_4 = 0.66;
  PFK_Ciatp_4 = 100;
  PFK_Kiatp_4 = 0.65;
  PFK_Camp_4 = 0.0845;
  PFK_Kamp_4 = 0.0995;
  PFK_Cf26_4 = 0.0174;
  PFK_Kf26_4 = 0.000682;
  PFK_Cf16_4 = 0.397;
  PFK_Kf16_4 = 0.111;
  PFK_Catp_4 = 3;
  ALD_Vmax_5 = 94.69;
  ALD_Kf16bp_5 = 0.3;
  ALD_Keq_5 = 0.069;
  ALD_Kdhap_5 = 2;
  ALD_Kgap_5 = 2.4;
  ALD_Kigap_5 = 10;
  TPI_k1_6 = 450000;
  TPI_k2_6 = 10000000;
  GAPDH_C_7 = 1;
  GAPDH_Vmaxf_7 = 1152;
  GAPDH_Kgap_7 = 0.21;
  GAPDH_Knad_7 = 0.09;
  GAPDH_Vmaxr_7 = 6719;
  GAPDH_Kbpg_7 = 0.0098;
  GAPDH_Knadh_7 = 0.06;
  PGK_Vmax_8 = 1288;
  PGK_Keq_8 = 3200;
  PGK_Kp3g_8 = 0.53;
  PGK_Katp_8 = 0.3;
  PGK_Kbpg_8 = 0.003;
  PGK_Kadp_8 = 0.2;
  PGM_Vmax_9 = 2585;
  PGM_Kp3g_9 = 1.2;
  PGM_Keq_9 = 0.19;
  PGM_Kp2g_9 = 0.08;
  ENO_Vmax_10 = 201.6;
  ENO_Kp2g_10 = 0.04;
  ENO_Keq_10 = 6.7;
  ENO_Kpep_10 = 0.5;
  PYK_Vmax_11 = 1000;
  PYK_Kpep_11 = 0.14;
  PYK_Kadp_11 = 0.53;
  PYK_Keq_11 = 6500;
  PYK_Kpyr_11 = 21;
  PYK_Katp_11 = 1.5;
  PDC_Vmax_12 = 857.8;
  PDC_Kpyr_12 = 4.33;
  PDC_nH_12 = 1.9;
  ADH_Vmax_13 = 209.5;
  ADH_Ketoh_13 = 17;
  ADH_Kinad_13 = 0.92;
  ADH_Keq_13 = 6.9e-5;
  ADH_Knad_13 = 0.17;
  ADH_Knadh_13 = 0.11;
  ADH_Kinadh_13 = 0.031;
  ADH_Kacald_13 = 1.11;
  ADH_Kiacald_13 = 1.1;
  ADH_Kietoh_13 = 90;
  ATPase_Katpase_14 = 39.5;
  AK_k1_15 = 45;
  AK_k2_15 = 100;
  G3PDH_Vmax_16 = 47.11;
  G3PDH_Kdhap_16 = 0.4;
  G3PDH_Knadh_16 = 0.023;
  G3PDH_Keq_16 = 4300;
  G3PDH_Kglycerol_16 = 1;
  G3PDH_Knad_16 = 0.93;
  Glycogen_Branch_KGLYCOGEN_17 = 6;
  Trehalose_Branch_Ktrehalose_18 = 2.4;
  Succinate_Branch_k_19 = 21.4;

  // Reactions:
  HXT: $GLCo -> GLCi; HXT_Vmax_1*(GLCo - GLCi)/HXT_Kglc_1/(1 + (GLCo + GLCi)/HXT_Kglc_1 + HXT_Ki_1*GLCo*GLCi/HXT_Kglc_1^2); HXT is "glucose transport";  // isVersionOf GO:0015758
  HK: GLCi + ATP -> G6P + ADP; cell*HK_Vmax_2*(GLCi*ATP/(HK_Kglc_2*HK_Katp_2) - G6P*ADP/(HK_Kglc_2*HK_Katp_2*HK_Keq_2))/((1 + GLCi/HK_Kglc_2 + G6P/HK_Kg6p_2)*(1 + ATP/HK_Katp_2 + ADP/HK_Kadp_2)); HK is "hexokinase";  // kegg.reaction:R02848; isVersionOf ec-code:2.7.1.1 GO:0004396
  PGI: G6P -> F6P; cell*PGI_Vmax_3*(G6P/PGI_Kg6p_3 - F6P/(PGI_Kg6p_3*PGI_Keq_3))/(1 + G6P/PGI_Kg6p_3 + F6P/PGI_Kf6p_3); PGI is "phosphoglucose isomerase";  // kegg.reaction:R00771; isVersionOf ec-code:5.3.1.9 GO:0004347
  PFK: ATP + F6P => ADP + F16bP; cell*PFK_Vmax_4*(PFK_gR_4*(F6P/PFK_Kf6p_4)*(ATP/PFK_Katp_4)*(1 + F6P/PFK_Kf6p_4 + ATP/PFK_Katp_4 + PFK_gR_4*F6P/PFK_Kf6p_4*ATP/PFK_Katp_4)/((1 + F6P/PFK_Kf6p_4 + ATP/PFK_Katp_4 + PFK_gR_4*F6P/PFK_Kf6p_4*ATP/PFK_Katp_4)^2 + PFK_L0_4*((1 + PFK_Ciatp_4*ATP/PFK_Kiatp_4)/(1 + ATP/PFK_Kiatp_4))^2*((1 + PFK_Camp_4*AMP/PFK_Kamp_4)/(1 + AMP/PFK_Kamp_4))^2*((1 + PFK_Cf26_4*F26bP/PFK_Kf26_4 + PFK_Cf16_4*F16bP/PFK_Kf16_4)/(1 + F26bP/PFK_Kf26_4 + F16bP/PFK_Kf16_4))^2*(1 + PFK_Catp_4*ATP/PFK_Katp_4)^2)); PFK is "phosphofructosekinase";  // modifiers: AMP, F26bP; isVersionOf ec-code:2.7.1.11 GO:0003872; kegg.reaction:R00756
  ALD: F16bP -> DHAP + GAP; cell*ALD_Vmax_5*(F16bP/ALD_Kf16bp_5 - DHAP*GAP/(ALD_Kf16bp_5*ALD_Keq_5))/(1 + F16bP/ALD_Kf16bp_5 + DHAP/ALD_Kdhap_5 + GAP/ALD_Kgap_5 + F16bP*GAP/(ALD_Kf16bp_5*ALD_Kigap_5) + DHAP*GAP/(ALD_Kdhap_5*ALD_Kgap_5)); ALD is "fructosebisphosphate aldolase";  // kegg.reaction:R01068; isVersionOf ec-code:4.1.2.13 GO:0004332
  TPI: DHAP -> GAP; cell*(TPI_k1_6*DHAP - TPI_k2_6*GAP); TPI is "triosephosphate isomerase";  // kegg.reaction:R01015; isVersionOf ec-code:5.3.1.1 GO:0004807
  GAPDH: GAP + NAD -> BPG + NADH; cell*GAPDH_C_7*(GAPDH_Vmaxf_7*GAP*NAD/(GAPDH_Kgap_7*GAPDH_Knad_7) - GAPDH_Vmaxr_7*BPG*NADH/(GAPDH_Kbpg_7*GAPDH_Knadh_7))/((1 + GAP/GAPDH_Kgap_7 + BPG/GAPDH_Kbpg_7)*(1 + NAD/GAPDH_Knad_7 + NADH/GAPDH_Knadh_7)); GAPDH is "glyceraldehyde phosphate dehydrogenase";  // kegg.reaction:R01061; isVersionOf ec-code:1.2.1.12 GO:0004365
  PGK: ADP + BPG -> ATP + P3G; cell*PGK_Vmax_8*((PGK_Keq_8*BPG*ADP - P3G*ATP)/(PGK_Kp3g_8*PGK_Katp_8))/((1 + BPG/PGK_Kbpg_8 + P3G/PGK_Kp3g_8)*(1 + ADP/PGK_Kadp_8 + ATP/PGK_Katp_8)); PGK is "3-phosphoglycerate kinase";  // kegg.reaction:R01512; isVersionOf ec-code:2.7.2.3 GO:0004618
  PGM: P3G -> P2G; cell*PGM_Vmax_9*(P3G/PGM_Kp3g_9 - P2G/(PGM_Kp3g_9*PGM_Keq_9))/(1 + P3G/PGM_Kp3g_9 + P2G/PGM_Kp2g_9); PGM is "phosphoglyceromutase";  // isVersionOf ec-code:5.4.2.1 GO:0004619; kegg.reaction:R01518
  ENO: P2G -> PEP; cell*ENO_Vmax_10*(P2G/ENO_Kp2g_10 - PEP/(ENO_Kp2g_10*ENO_Keq_10))/(1 + P2G/ENO_Kp2g_10 + PEP/ENO_Kpep_10); ENO is "enolase";  // kegg.reaction:R00658; isVersionOf ec-code:4.2.1.11 GO:0004634
  PYK: ADP + PEP -> ATP + PYR; cell*PYK_Vmax_11*(PEP*ADP/(PYK_Kpep_11*PYK_Kadp_11) - PYR*ATP/(PYK_Kpep_11*PYK_Kadp_11*PYK_Keq_11))/((1 + PEP/PYK_Kpep_11 + PYR/PYK_Kpyr_11)*(1 + ADP/PYK_Kadp_11 + ATP/PYK_Katp_11)); PYK is "pyruvate kinase";  // kegg.reaction:R00200; isVersionOf ec-code:2.7.1.40 GO:0004743
  PDC: PYR => AcAld + $CO2; cell*PDC_Vmax_12*(PYR/PDC_Kpyr_12)^PDC_nH_12/(1 + (PYR/PDC_Kpyr_12)^PDC_nH_12); PDC is "pyruvate decarboxylase";  // kegg.reaction:R00636; isVersionOf ec-code:4.1.1.1 GO:0004737
  ADH: NAD + $EtOH -> NADH + AcAld; cell*ADH_Vmax_13*(EtOH*NAD/(ADH_Ketoh_13*ADH_Kinad_13) - AcAld*NADH/(ADH_Ketoh_13*ADH_Kinad_13*ADH_Keq_13))/(1 + NAD/ADH_Kinad_13 + EtOH*ADH_Knad_13/(ADH_Kinad_13*ADH_Ketoh_13) + AcAld*ADH_Knadh_13/(ADH_Kinadh_13*ADH_Kacald_13) + NADH/ADH_Kinadh_13 + EtOH*NAD/(ADH_Kinad_13*ADH_Ketoh_13) + NAD*AcAld*ADH_Knadh_13/(ADH_Kinad_13*ADH_Kinadh_13*ADH_Kacald_13) + EtOH*NADH*ADH_Knad_13/(ADH_Kinad_13*ADH_Kinadh_13*ADH_Ketoh_13) + AcAld*NADH/(ADH_Kacald_13*ADH_Kinadh_13) + EtOH*NAD*AcAld/(ADH_Kinad_13*ADH_Kiacald_13*ADH_Ketoh_13) + EtOH*AcAld*NADH/(ADH_Kietoh_13*ADH_Kinadh_13*ADH_Kacald_13)); ADH is "alcohol dehydrogenase";  // kegg.reaction:R00754; isVersionOf ec-code:1.1.1.1 GO:0004022
  ATPase: ATP => ADP; cell*ATPase_Katpase_14*ATP;  // isVersionOf GO:0016887
  AK: 2 ADP -> ATP + AMP; cell*(AK_k1_15*ADP*ADP - AK_k2_15*ATP*AMP);  // isVersionOf ec-code:2.7.4.3 GO:0004017; kegg.reaction:R00127
  G3PDH: DHAP + NADH => NAD + $Glycerol; cell*G3PDH_Vmax_16*(DHAP/G3PDH_Kdhap_16*(NADH/G3PDH_Knadh_16) - Glycerol/G3PDH_Kdhap_16*(NAD/G3PDH_Knadh_16)*(1/G3PDH_Keq_16))/((1 + DHAP/G3PDH_Kdhap_16 + Glycerol/G3PDH_Kglycerol_16)*(1 + NADH/G3PDH_Knadh_16 + NAD/G3PDH_Knad_16)); G3PDH is "glycerol-3-phosphate dehydrogenase";  // hasPart kegg.reaction:R00842 kegg.reaction:R07298; hasVersion ec-code:3.1.3.21 ec-code:1.1.1.8; isVersionOf GO:0006114
  Glycogen_Branch: ATP + G6P => ADP + $Glycogen; cell*Glycogen_Branch_KGLYCOGEN_17;  // isVersionOf GO:0005978
  Trehalose_Branch: ATP + 2 G6P => ADP + $Trehalose; cell*Trehalose_Branch_Ktrehalose_18;  // isVersionOf GO:0005992
  Succinate_Branch: 3 NAD + 2 AcAld => 3 NADH + $Succinate; cell*Succinate_Branch_k_19*AcAld;  // isVersionOf GO:0006105

  // Unit definitions:
  unit substance = 1e-3 mole; substance is "mmole";
  unit time_unit = 60 second; time_unit is "minute";
end
